base
#Mach
 0.0
#Iysym   IZsym   Zsym
  0      0     0.0

#Sref    Cref    Bref 	<meters>
124.862      4.235     34.32

#Xref    Yref    Zref   <meters>
0.0      0.0     0.0


#---------------------------------------------------------
SURFACE
main_wing
#Nchordwise  Cspace   Nspanwise  Sspace
10         1.0         15      1.0

YDUPLICATE
0.0


SECTION
#Xle    Yle      Zle      Chord     Ainc  Nspanwise  Sspace
13.61  0    -1.27    7.76    0.0

AFILE
NACA65_410.dat

SECTION
#Xle    Yle      Zle      Chord     Ainc  Nspanwise  Sspace
16.45371876600241  5.148    -1.27    3.88    0.0

AFILE
NACA65_410.dat

SECTION
#Xle    Yle      Zle      Chord     Ainc  Nspanwise  Sspace
18.71543753200482  10.296    -1.27    2.328    0.0

AFILE
NACA65_410.dat

SECTION
#Xle    Yle      Zle      Chord     Ainc  Nspanwise  Sspace
21.22188420299784  16.6452    -1.0482810503429953    1.552    0.0

AFILE
NACA65_410.dat


#---------------------------------------------------------
SURFACE
horizontal_stabilizer
#Nchordwise  Cspace   Nspanwise  Sspace
10         1.0         15      1.0

YDUPLICATE
0.0


SECTION
#Xle    Yle      Zle      Chord     Ainc  Nspanwise  Sspace
32.83  0    1.14    4.7    0.05235987755982989

SECTION
#Xle    Yle      Zle      Chord     Ainc  Nspanwise  Sspace
38.78760738135868  7.1    1.14    0.955    0.05235987755982989


#---------------------------------------------------------
SURFACE
vertical_stabilizer
#Nchordwise  Cspace   Nspanwise  Sspace
10         1.0         15      -1.1

SECTION
#Xle    Yle      Zle      Chord     Ainc  Nspanwise  Sspace
28.79  0    1.54    8.19    0.0

SECTION
#Xle    Yle      Zle      Chord     Ainc  Nspanwise  Sspace
35.3156778316657  0.0    7.777    0.95    0.0


#---------------------------------------------------------
SURFACE
fuselage_horizontal
#Nchordwise  Cspace   Nspanwise  Sspace
10           1.0

SECTION
#Xle     Yle      Zle      Chord     Ainc  Nspanwise  Sspace
6.4    -1.87     0.0     23.620000000000005     0.0      1        0

SECTION
#Xle     Yle      Zle      Chord     Ainc  Nspanwise  Sspace
3.646120382510198    -1.496     0.0     29.57140016426987     0.0      1        0

SECTION
#Xle     Yle      Zle      Chord     Ainc  Nspanwise  Sspace
2.194368170585176    -1.122     0.0     32.84782365235238     0.0      1        0

SECTION
#Xle     Yle      Zle      Chord     Ainc  Nspanwise  Sspace
1.1407677166920687    -0.7480000000000002     0.0     35.277380371132004     0.0      1        0

SECTION
#Xle     Yle      Zle      Chord     Ainc  Nspanwise  Sspace
0.3924644135651958    -0.3740000000000001     0.0     37.04652091031138     0.0      1        0

SECTION
#Xle     Yle      Zle      Chord     Ainc  Nspanwise  Sspace
0.0    0.0     0.0     38.02     0.0      1        0

SECTION
#Xle     Yle      Zle      Chord     Ainc  Nspanwise  Sspace
0.3924644135651949    0.37399999999999967     0.0     37.04652091031138     0.0      1        0

SECTION
#Xle     Yle      Zle      Chord     Ainc  Nspanwise  Sspace
1.140767716692067    0.7479999999999998     0.0     35.27738037113201     0.0      1        0

SECTION
#Xle     Yle      Zle      Chord     Ainc  Nspanwise  Sspace
2.194368170585176    1.1219999999999999     0.0     32.84782365235238     0.0      1        0

SECTION
#Xle     Yle      Zle      Chord     Ainc  Nspanwise  Sspace
3.646120382510198    1.496     0.0     29.57140016426987     0.0      1        0

SECTION
#Xle     Yle      Zle      Chord     Ainc  Nspanwise  Sspace
6.4    1.87     0.0     23.620000000000005     0.0      1        0


#---------------------------------------------------------
SURFACE
fuselage_vertical
#Nchordwise  Cspace   Nspanwise  Sspace
10           1.0

SECTION
#Xle     Yle      Zle      Chord     Ainc  Nspanwise  Sspace
6.4    0.0     -1.87     23.620000000000005     0.0      1        0

SECTION
#Xle     Yle      Zle      Chord     Ainc  Nspanwise  Sspace
3.646120382510198    0.0     -1.496     29.57140016426987     0.0      1        0

SECTION
#Xle     Yle      Zle      Chord     Ainc  Nspanwise  Sspace
2.194368170585176    0.0     -1.122     32.84782365235238     0.0      1        0

SECTION
#Xle     Yle      Zle      Chord     Ainc  Nspanwise  Sspace
1.1407677166920687    0.0     -0.7480000000000002     35.277380371132004     0.0      1        0

SECTION
#Xle     Yle      Zle      Chord     Ainc  Nspanwise  Sspace
0.3924644135651958    0.0     -0.3740000000000001     37.04652091031138     0.0      1        0

SECTION
#Xle     Yle      Zle      Chord     Ainc  Nspanwise  Sspace
0.0    0.0     0.0     38.02     0.0      1        0

SECTION
#Xle     Yle      Zle      Chord     Ainc  Nspanwise  Sspace
0.3924644135651949    0.0     0.37399999999999967     37.04652091031138     0.0      1        0

SECTION
#Xle     Yle      Zle      Chord     Ainc  Nspanwise  Sspace
1.140767716692067    0.0     0.7479999999999998     35.27738037113201     0.0      1        0

SECTION
#Xle     Yle      Zle      Chord     Ainc  Nspanwise  Sspace
2.194368170585176    0.0     1.1219999999999999     32.84782365235238     0.0      1        0

SECTION
#Xle     Yle      Zle      Chord     Ainc  Nspanwise  Sspace
3.646120382510198    0.0     1.496     29.57140016426987     0.0      1        0

SECTION
#Xle     Yle      Zle      Chord     Ainc  Nspanwise  Sspace
6.4    0.0     1.87     23.620000000000005     0.0      1        0
